// SBML level 2 version 4
// This model was downloaded from BioModels Database
// http://www.ebi.ac.uk/biomodels-static/

model MODEL1509230010()
  // Sluka2016 - Acetaminophen PBPK
  // Basic PBPK (Physiologically Based PharmacoKinetic) model of Acetaminophen.
  // This is a basic model of Acetaminophen (APAP, Paracetamol) pharmacokinetics in humans. Many of the model parameters (compartment volumes, volumetric flow rates, etc.) are scaled allometrically based on the body weight (BW) raised to the 3/4 power. Because of that, the assigned values of many of the parameters are recalculated at run time and are different than the default values for the particular entity (e.g., the volume of a compartment and the volumetric flow rate between compartments).
  // APAP dose is initially given in grams (APAP_Dose_gram), which is converted to moles via the APAP molecular weight (APAP_MW). APAP quantities throughout the rest of the models are given in moles.
  // The base parameters are for a 70Kg human and a pharmacological oral dose of 1.4 gram of APAP. Metabolism is modelled as a single ODE in the liver compartment and the metabolite does not leave that compartment.
  // This model is loosely based on the model of Wambaugh and Shaw (PLoS Comput Biol. 2010 Apr 22;6(4):e1000756. doi: 10.1371/journal.pcbi.1000756. Pubmed ID: PMID- 20421935) with the following changes:
  // The lung lumen compartment was omitted.
  // A kidney compartment was added.
  // Glomerular Filtration is from the kidney compartment.
  // The APAP dose was changed to 1.4g.
  // The gut adsorption rate constant (KGutabs), tissue partition coefficients and liver metabolism rate constant (CLmetabolism) were fit using the human in vivo data of Critchley (Critchley, J. A., Critchley, L. A. H., Anderson, P. J., and Tomlinson, B. 2005 Journal of clinical pharmacy and therapeutics, 30(2), 179-184).
  // To model the extensive re-adsorption of APAP from the kidney tubules back into the blood the QGfr value is modified. This was done by changing the scaling parameter QGFR_ref value from 0.31 to 0.039, resulting in a decrease in the QGfr value of 8 fold (from 7.2 L/hr to 0.91 L/hr).
  // The parameters in this file are the REFSIM parameters from our publication.
  // biomodels.db:MODEL1509230010
  // biomodels.db:BIOMD0000000619
  // isDescribedBy pubmed:27636091
  // isDerivedFrom pubmed:20421935
  // isVersionOf GO:0042910 GO:0017144
  // hasTaxon taxonomy:9606

  // Compartments:
  // Volume of the arterial blood. Note that this value is modified by allometric scaling in an initial assignment or rule equation.
  compartment VArt = VTotal*VArt_fraction_VTotal; VArt has volume;
  // Perfusable volume of the Gut (small intestine). The compartment volume is allometrically scaled and is assigned in an initialAssignment.
  compartment VGut = VTotal*VGut_fraction_VTotal; VGut has volume;
  // Lumen of the Gut. Note that the volume is arbitrary.
  compartment VGutLumen in VGut = 1 volume;
  // Perfusable volume of the Lungs. The compartment volume is allometrically scaled and is assigned in an initialAssignment.
  compartment VLung = VTotal*VLung_fraction_VTotal; VLung has volume;
  // Volume of the venous blood. The compartment volume is allometrically scaled and is assigned in an initialAssignment.
  compartment VVen = VTotal*VVen_fraction_VTotal; VVen has volume;
  // Perfusable volume of the Rest of the body, that is, all tissues and blood volumes not explicitly described by other compartments. The compartment volume is allometrically scaled and is assigned in an initialAssignment.
  compartment VRest = VTotal - VArt - VGut - VKidney - VLiver - VLung - VVen; VRest has volume;
  // Perfusable volume of the Liver. The compartment volume is allometrically scaled and is assigned in an initialAssignment.
  compartment VLiver = VTotal*VLiver_fraction_VTotal; VLiver has volume;
  // Perfusable volume of the Kidney. The compartment volume is allometrically scaled and is assigned in an initialAssignment.
  compartment VKidney = VTotal*VKidney_fraction_VTotal; VKidney has volume;
  // Kidney (renal) Tubules (lumen). This, like the gut lumen, is treated as a volumeless compartment.
  compartment VKidneyTubules in VKidney = 1 volume;

  // Species:
  // Amount of APAP in the arteries of the gut in moles.
  substanceOnly species CArt in VArt = 0;
  // Amount of APAP in the gut (small intestine) blood in moles.
  substanceOnly species CGut in VGut = 0;
  // Amount of APAP in the lumen of the gut in moles.
  substanceOnly species AGutlumen in VGutLumen = APAP_Dose;
  // Amount of APAP in the lung blood in moles.
  substanceOnly species CLung in VLung = 0;
  // Amount of APAP in the venous blood in moles.
  substanceOnly species CVen in VVen = 0;
  // Amount of APAP in the "rest of the body" in moles.
  substanceOnly species CRest in VRest = 0;
  // Amount of APAP in the liver blood in moles.
  substanceOnly species CLiver in VLiver = 0;
  substanceOnly species CMetabolized in VLiver = 0;
  // Amount of APAP in the kidney blood in moles.
  substanceOnly species CKidney in VKidney = 0;
  // Amount of APAP in the Kidney Tubules in moles.
  substanceOnly species CTubules in VKidneyTubules = 0;

  // Parameters:
  // APAP dose in grams.
  APAP_Dose_grams = 1.4 gram;
  // Acetaminophen molecular weight in grams/mole.
  APAP_MW = 151.2 grams2mol;
  // Acetaminophen dose in moles. = APAP_Dose_grams/APAP_MW. Note that this value is assigned by an initial assignment or rule equation.
  APAP_Dose = APAP_Dose_grams/APAP_MW; APAP_Dose has substance;
  // Body weight, in Kg. This value, raised to the 3/4 power, is used in the allometric scaling equations
  BW = 70 kilogram;
  // De-dimensionalization factor for the allometric scaling. Removes the non-integer exponent of the BW^(3/4) scaling factor in the allometric equations.
  BW_ref = 1 BW_ref;
  // Total cardiac output reference value for individual of BW=BW_ref (70Kg) for allometric scaling. In Litres/hour.
  Cardiac_flow_ref = 15 Volumetric_Flow;
  // Cardiac blood flow in Litres/hr. (aka arterial blood flow or QArt). Note that this value is modified by allometric scaling in an initial assignment or rule equation.
  QCardiac = Cardiac_flow_ref*(BW/BW_ref)^0.75; QCardiac has Volumetric_Flow;
  // Allometric scaling coefficient for fraction of cardiac output (QCardiac) that flows through the Gut (QGut).
  QGut_fraction_QCardiac = 0.205 dimensionless;
  // Volumetric blood flow through the gut in Litres/hour. Note that this value is modified by allometric scaling in an initial assignment or rule equation.
  QGut = QCardiac*QGut_fraction_QCardiac; QGut has Volumetric_Flow;
  // Allometric scaling coefficient for fraction of cardiac output (QCardiac) that flows through the Liver (QLiver).
  QLiver_fraction_QCardiac = 0.0535 dimensionless;
  // Perfusable volume of the Liver in Litres/hr. Note that this value is modified by allometric scaling in an initial assignment or rule equation.
  QLiver = QCardiac*QLiver_fraction_QCardiac; QLiver has Volumetric_Flow;
  // Allometric scaling coefficient for fraction of cardiac output (QCardiac) that flows through the Kidney (QKidney).
  QKidney_fraction_QCardiac = 0.2214 dimensionless;
  // Kidney blood flow in Litres/hr. Note that this value is modified by allometric scaling in an initial assignment or rule equation.
  QKidney = QCardiac*QKidney_fraction_QCardiac; QKidney has Volumetric_Flow;
  // Blood throw through all other tissues, Litres/hour. Note that this value is modified by allometric scaling in an initial assignment or rule equation.
  QRest = QCardiac - QGut - QKidney - QLiver; QRest has Volumetric_Flow;
  // Qgfr coefficient for allometric scaling.
  // NOTE: The normal value for this parameter is 21.7L/hr. The value shown here reflects the extensive re-adsorption of APAP from the kidney tubules back into the blood.
  QGFR_ref = 0.039 Volumetric_Flow;
  // Granulocyte filtration rate in Litres/hour. Note that this value is modified by allometric scaling in an initial assignment or rule equation. In addition, this vlue is greatly reduced to simulate resorption of APAP from the tubules in the kidney.
  Qgfr = QGFR_ref*(BW/BW_ref)^0.75; Qgfr has Volumetric_Flow;
  kGutabs = 1.5 first_order_rate_constant;
  // Rate of metabolism of APAP in the liver. This single kinetic constant represents both Phase I (e.g., Cyp-2E1) and Phase II (glucurondiation and sulfation) metabolism.
  CLmetabolism = 9.5 first_order_rate_constant;
  // Fraction of compound in plasma that is not bound by plasma proteins.
  Fraction_unbound_plasma = 0.8 dimensionless;
  // Ratio of the compound amount in (total) blood vs. plasma.
  Ratioblood2plasma = 1.09 dimensionless;
  // Partition coefficient for compound between the Liver and the blood plasma.
  Kliver2plasma = 1 dimensionless;
  // Partition coefficient for compound between the Kidney and the blood plasma.
  Kkidney2plasma = 1 dimensionless;
  // Partition coefficient for compound between the Rest (of body) and the blood plasma.
  KRest2plasma = 1.6 dimensionless;
  // Total perfusable volume of the body coefficient for allometric scaling. This is the lean fraction of Body Weight.
  VTotal_ref = 0.6 volume;
  // Total perfusable volume of the body in Litres. Note that this value is modified by allometric scaling in an initial assignment or rule equation.
  VTotal = VTotal_ref*(BW/BW_ref); VTotal has volume;
  // Allometric scaling coefficient for fraction of total perfusable volume of the body (VTotal) represented by the Liver (VLiver).
  VLiver_fraction_VTotal = 0.0408 dimensionless;
  // Allometric scaling coefficient for fraction of cardiac output (QCardiac) that flows through the Arteries (QArt).
  VArt_fraction_VTotal = 0.0357 dimensionless;
  // Allometric scaling coefficient for fraction of total perfusable volume of the body (VTotal) represented by the Lungs (VLung).
  VLung_fraction_VTotal = 0.0121 dimensionless;
  // Allometric scaling coefficient for fraction of total perfusable volume of the body (VTotal) represented by the Veins (VVen).
  VVen_fraction_VTotal = 0.0812 dimensionless;
  // Allometric scaling coefficient for fraction of total perfusable volume of the body (VTotal) represented by the Gut/stomach/small intestine (VGut).
  VGut_fraction_VTotal = 0.0263 dimensionless;
  // Allometric scaling coefficient for fraction of total perfusable volume of the body (VTotal) represented by the Kidneys (VKidney).
  VKidney_fraction_VTotal = 0.007 dimensionless;

  // Reactions:
  // Blood born transfer of compound from the Arterial compartment (CArt) to the Gut (CGut) in moles/hour.
  J1: CArt => CGut; QGut/VArt*CArt; J1 is "J01";
  // First order adsorption of compound from the lumen of the gut (AGutlumen) to the gut compartment (CGut) in mole/hour.
  J2: AGutlumen => CGut; kGutabs*AGutlumen; J2 is "J02";
  // Blood born transfer of compound from the Lung compartment (CLung) to the Arterial blood compartment (CArt) in moles/hour.
  J3: CLung => CArt; QCardiac/VLung*CLung; J3 is "J03";
  // Blood born transfer of compound from the Venous compartment (CVen) to the Lung compartment (CLung) in moles/hour.
  J4: CVen => CLung; QCardiac/VVen*CVen; J4 is "J04";
  // Blood born transfer of compound from the Arterial compartment (CArt) to the Rest of the body compartment (CRest) in moles/hour.
  J5: CArt => CRest; QRest*(CArt/VArt); J5 is "J05";
  // Blood born transfer of compound from the Rest compartment (CRest) to the Venous compartment (CVen) in moles/hour.
  J6: CRest => CVen; QRest/VRest*CRest*Ratioblood2plasma/(KRest2plasma*Fraction_unbound_plasma); J6 is "J06";
  // Blood born transfer of compound from the Arterial compartment (CArt) to the Liver compartment (CLiver) in moles/hour.
  J7: CArt => CLiver; QLiver/VArt*CArt; J7 is "J07";
  // Metabolism of compound in the Liver compartment (CLiver) to metabolites (CMetabolized) in moles/hour. The metabolites stay in the liver compartment. This single first order ODE represents both Phase I (Cyp-P450 2E1, 1A2) and Phase II (glucuronidation and sulfation) reactions.
  J8: CLiver => CMetabolized; CLmetabolism*CLiver/(Kliver2plasma*Fraction_unbound_plasma); J8 is "J08";
  // Blood born transfer of compound from the Gut compartment (CGut) to the Liver compartment (CLiver) in moles/hour.
  J9: CGut => CLiver; QGut/VGut*CGut; J9 is "J09";
  // Blood born transfer of compound from the Liver compartment (CLiver) to the Venous compartment (CVen) in moles/hour.
  J10: CLiver => CVen; (QLiver + QGut)/VLiver*CLiver*Ratioblood2plasma/(Kliver2plasma*Fraction_unbound_plasma);
  // Blood born transfer of compound from the Arterial compartment (CArt) to the Kidney compartment (CKidney) in moles/hour.
  J11: CArt => CKidney; QKidney/VArt*CArt;
  // Transfer of compound from the Kidney compartment (CKidney) to the Kidney tubules (species CTubules in the compartment "KidenyTubules") in moles/hour.
  J12: CKidney => CTubules; Qgfr/VKidney*CKidney/Kkidney2plasma;
  // Blood born transfer of compound from the Kidney compartment (CKidney) to the Venous compartment (CVen) in moles/hour.
  J13: CKidney => CVen; QKidney/VKidney*CKidney*Ratioblood2plasma/(Kkidney2plasma*Fraction_unbound_plasma);

  // Unit definitions:
  unit time = 3600 second; time is "hour";
  unit first_order_rate_constant = 1 / (3600 second);
  unit Volumetric_Flow = litre / (3600 second);
  unit volume = litre; volume is "litre";
  unit substance = mole; substance is "mole";
  // Units of molecular weight: grams/mole
  unit grams2mol = gram / mole;
  // Reference body weight (Kg) for allometric scaling.
  unit BW_ref = kilogram;
end
